// SBML level 3 version 1

model main()
  // model units - substance: mole, time: second, volume: litre, area: square_metre, length: metre, extent: mole

  // Compartments:
  compartment default = 1e-6;

  // Species:
  species A in default = 46;
  species G in default = 63;
  species E in default = 32;
  species B in default = 22;
  species C in default = 96;
  species D in default = 99;
  species F in default = 24;

  // Parameters:
  DummyVar_UnimolecularPropensity_k_0 = 3.068;
  DummyVar_UnimolecularPropensity_k_1 = 2.255;

  // Reactions:
  r0: A => E + B + G; A*DummyVar_UnimolecularPropensity_k_0;
  r1: E => ; DummyVar_UnimolecularPropensity_k_1*E;

  // Unit definitions:
  unit square_metre = metre^2;
end
